<?xml version="1.0"?>
<?xml-stylesheet type="text/xsl" href="http://jsbsim.sourceforge.net/JSBSim.xsl"?>
<fdm_config name="flyingboat" version="2.0" release="BETA"
	    xmlns:xsi="http://www.w3.org/2001/XMLSchema-instance"
	    xsi:noNamespaceSchemaLocation="http://jsbsim.sourceforge.net/JSBSim.xsd">

  <fileheader>
    <author>Josh Babcock, Ron Jensen, JWOCKY, IH-COL</author>
    <filecreationdate>2011-06-27</filecreationdate>
    <version>$Id: b29.xml, v 0.1 2011/06/29 14:22:04 jentron Exp $</version>
    <description>B-29 Super Fortress</description>
  </fileheader>

  <!--
  File:     b29.xml
  Author:   Aero-Matic v 0.71

  Inputs:
  name:          b29
  type:          multi-engine prop transport|bomber
  max weight:    135000 lb
  wing span:     141 ft
  length:        99 ft
  wing area:     1736 sq-ft
  gear type:     tricycle
  retractable?:  yes
  # engines:     4
  engine type:   piston
  engine layout: wings
  yaw damper?    no

  Outputs:
  wing loading:  77.76 lb/sq-ft
  CL-alpha:      4.9 per radian
  CL-0:          0.24
  CL-max:        1.4
  CD-0:          0.025
  K:             0.039
  -->

  <metrics>
    <wingarea unit="FT2">1736.0</wingarea>
    <wingspan unit="FT">141.25</wingspan>
    <chord unit="FT">12.31</chord>
    <wing_incidence>0.0</wing_incidence>
    <htailarea unit="FT2">80.0</htailarea>
    <htailarm unit="FT">48.0</htailarm>
    <vtailarea unit="FT2">131.9</vtailarea>
    <vtailarm unit="FT">45.0</vtailarm>
    <location name="AERORP" unit="IN">
      <x>568.0</x>
      <y>0</y>
      <z>0</z>
    </location>
    <location name="EYEPOINT" unit="IN">
      <x>95.0</x>
      <y>-24.0</y>
      <z>65.0</z>
    </location>
    <location name="VRP" unit="IN">
      <x>0</x>
      <y>0</y>
      <z>-20</z>
    </location>
  </metrics>

  <mass_balance>
    <ixx unit="SLUG*FT2">3200718</ixx>
    <iyy unit="SLUG*FT2">1887625</iyy>
    <izz unit="SLUG*FT2">5001121</izz>
    <emptywt unit="LBS">74500</emptywt>
    <location name="CG" unit="IN">
      <x>568.0</x>
      <y>0.0</y>
      <z>0.0</z>
    </location>
   <pointmass name="Crew">
    <description> 99516 LBS + full (33909 LBS) fuel should bring model up to entered max weight</description>
    <weight unit="LBS"> 2000.00 </weight>
    <location name="POINTMASS" unit="IN">
      <x> 140.00 </x>
      <y>   0.00 </y>
      <z> -29.70 </z>
    </location>
   </pointmass>
   <pointmass name="Bomb Bay 1">
    <description> 99516 LBS + full (33909 LBS) fuel should bring model up to entered max weight</description>
    <weight unit="LBS">  27758.2 </weight>
    <location name="POINTMASS" unit="IN">
      <x> 375.00 </x>
      <y>   0.00 </y>
      <z> -29.70 </z>
    </location>
   </pointmass>
   <pointmass name="Bomb Bay 2">
    <description> 99516 LBS + full (33909 LBS) fuel should bring model up to entered max weight</description>
    <weight unit="LBS">  22000.2 </weight>
    <location name="POINTMASS" unit="IN">
      <x> 730.00 </x>
      <y>   0.00 </y>
      <z> -29.70 </z>
    </location>
  </pointmass>
</mass_balance>

  <ground_reactions>

    <contact type="BOGEY" name="NOSE">
      <location unit="IN">
	<x>42.6</x>
	<y>0.0</y>
	<z>-145</z>
      </location>
      <spring_coeff unit="LBS/FT">40050.0</spring_coeff>
      <damping_coeff unit="LBS/FT/SEC">13350.0</damping_coeff>
      <dynamic_friction>0.5</dynamic_friction>
      <static_friction>0.8</static_friction>
      <rolling_friction>0.02</rolling_friction>
      <steerability>STEERABLE</steerability>
      <max_steer unit="DEG">45.0</max_steer>
      <brake_group>NOSE</brake_group><!-- This was what the original said rkj -->
      <retractable>1</retractable>
    </contact>

    <contact type="BOGEY" name="LEFT">
      <location unit="IN">
	<x>570.65</x>
	<y>-341.6</y>
	<z>-145</z>
      </location>
      <spring_coeff unit="LBS/FT">133500.0</spring_coeff>
      <damping_coeff unit="LBS/FT/SEC">26700.0</damping_coeff>
      <dynamic_friction>0.5</dynamic_friction>
      <static_friction>0.8</static_friction>
      <rolling_friction>0.02</rolling_friction>
      <max_steer unit="DEG">0</max_steer>
      <brake_group>LEFT</brake_group>
      <retractable>1</retractable>
    </contact>

    <contact type="BOGEY" name="RIGHT">
      <location unit="IN">
	<x>570.65</x>
	<y>341.6</y>
	<z>-145</z>
      </location>
      <spring_coeff unit="LBS/FT">133500.0</spring_coeff>
      <damping_coeff unit="LBS/FT/SEC">26700.0</damping_coeff>
      <dynamic_friction>0.5</dynamic_friction>
      <static_friction>0.8</static_friction>
      <rolling_friction>0.02</rolling_friction>
      <max_steer unit="DEG">0</max_steer>
      <brake_group>RIGHT</brake_group>
      <retractable>1</retractable>
    </contact>

    <contact type="STRUCTURE" name="TAILSKID">
      <location unit="IN">
	<x>1027.0</x>
	<y>0.0</y>
	<z>-55</z>
      </location>
      <spring_coeff unit="LBS/FT">400000.0</spring_coeff>
      <damping_coeff unit="LBS/FT/SEC">30000.0</damping_coeff>
      <dynamic_friction>0.25</dynamic_friction>
      <static_friction>0.4</static_friction>
      <rolling_friction>0.25</rolling_friction>
      <max_steer unit="DEG">0</max_steer>
      <brake_group>NONE</brake_group>
      <retractable>1</retractable>
    </contact>

    <contact type="STRUCTURE" name="LEFT_TIP">
      <location unit="IN">
	<x>432.0</x>
	<y>-858.0</y>
	<z>55.0</z>
      </location>
      <spring_coeff unit="LBS/FT">600000.0</spring_coeff>
      <damping_coeff unit="LBS/FT/SEC">50000.0</damping_coeff>
      <dynamic_friction>0.25</dynamic_friction>
      <static_friction>0.4</static_friction>
      <rolling_friction>0.25</rolling_friction>
      <max_steer unit="DEG">0</max_steer>
    </contact>

    <contact type="STRUCTURE" name="RIGHT_TIP">
      <location unit="IN">
	<x>432.0</x>
	<y>858.0</y>
	<z>55.0</z>
      </location>
      <spring_coeff unit="LBS/FT">600000.0</spring_coeff>
      <damping_coeff unit="LBS/FT/SEC">50000.0</damping_coeff>
      <dynamic_friction>0.25</dynamic_friction>
      <static_friction>0.4</static_friction>
      <rolling_friction>0.25</rolling_friction>
      <max_steer unit="DEG">0</max_steer>
    </contact>

    <!-- contact type="STRUCTURE" name="ENG_1">
    <location unit="IN">
      <x>335.0</x>
      <y>-362.0</y>
      <z>-45.0</z>
    </location>
    <spring_coeff unit="LBS/FT">600000.0</spring_coeff>
    <damping_coeff unit="LBS/FT/SEC">50000.0</damping_coeff>
    <dynamic_friction>0.25</dynamic_friction>
    <static_friction>0.4</static_friction>
    <rolling_friction>0.25</rolling_friction>
    <max_steer unit="DEG">0</max_steer>
  </contact>

  <contact type="STRUCTURE" name="ENG_4" >
    <location unit="IN">
      <x>335.0</x>
      <y>362.0</y>
      <z>-45.0</z>
    </location>
    <spring_coeff unit="LBS/FT">600000.0</spring_coeff>
    <damping_coeff unit="LBS/FT/SEC">50000.0</damping_coeff>
    <dynamic_friction>0.25</dynamic_friction>
    <static_friction>0.4</static_friction>
    <rolling_friction>0.25</rolling_friction>
    <max_steer unit="DEG">0</max_steer>
    </contact -->

    <!-- contact type="STRUCTURE" name="NOSE_DOR">
    <location unit="IN">
      <x>105</x>
      <y>0.0</y>
      <z>60.0</z>
    </location>
    <spring_coeff unit="LBS/FT">400000.0</spring_coeff>
    <damping_coeff unit="LBS/FT/SEC">30000.0</damping_coeff>
    <dynamic_friction>0.25</dynamic_friction>
    <static_friction>0.4</static_friction>
    <rolling_friction>0.25</rolling_friction>
    <max_steer unit="DEG">0</max_steer>
  </contact>

  <contact type="STRUCTURE" name="NOSE_VENT">
    <location unit="IN">
      <x>105</x>
      <y>0.0</y>
      <z>-60.0</z>
    </location>
    <spring_coeff unit="LBS/FT">400000.0</spring_coeff>
    <damping_coeff unit="LBS/FT/SEC">30000.0</damping_coeff>
    <dynamic_friction>0.25</dynamic_friction>
    <static_friction>0.4</static_friction>
    <rolling_friction>0.25</rolling_friction>
    <max_steer unit="DEG">0</max_steer>
  </contact>

  <contact type="STRUCTURE" name="BELLY">
    <location unit="IN">
      <x>630</x>
      <y>0.0</y>
      <z>-60.0</z>
    </location>
    <spring_coeff unit="LBS/FT">400000.0</spring_coeff>
    <damping_coeff unit="LBS/FT/SEC">30000.0</damping_coeff>
    <dynamic_friction>0.25</dynamic_friction>
    <static_friction>0.4</static_friction>
    <rolling_friction>0.25</rolling_friction>
    <max_steer unit="DEG">0</max_steer>
  </contact>

  <contact type="STRUCTURE" name="TAIL_VENT">
    <location unit="IN">
      <x>1188.0</x>
      <y>0.0</y>
      <z>15.0</z>
    </location>
    <spring_coeff unit="LBS/FT">600000.0</spring_coeff>
    <damping_coeff unit="LBS/FT/SEC">50000.0</damping_coeff>
    <dynamic_friction>0.25</dynamic_friction>
    <static_friction>0.4</static_friction>
    <rolling_friction>0.25</rolling_friction>
  </contact>

  <contact type="STRUCTURE" name="TAIL_DOR">
    <location unit="IN">
      <x>1188.0</x>
      <y>0.0</y>
      <z>72.0</z>
    </location>
    <spring_coeff unit="LBS/FT">600000.0</spring_coeff>
    <damping_coeff unit="LBS/FT/SEC">50000.0</damping_coeff>
    <dynamic_friction>0.25</dynamic_friction>
    <static_friction>0.4</static_friction>
    <rolling_friction>0.25</rolling_friction>
    <max_steer unit="DEG">0</max_steer>
    </contact -->
  </ground_reactions>

  <propulsion>
    <engine file="eng_R3350">
      <location unit="IN">
	<x>558.32</x>
	<y>-386.4</y>
	<z>16</z>
      </location>
      <orient unit="DEG">
	<pitch>1</pitch>
	<roll>0</roll>
	<yaw>0</yaw>
      </orient>
      <feed>0</feed>
      <thruster file="prop_200in4v">
	<location>
	  <x>556.32</x>
	  <y>-386.4</y>
	  <z>16</z>
	</location>
	<orient unit="DEG">
	  <pitch>1</pitch>
	  <roll>0</roll>
	  <yaw>0</yaw>
	</orient>
      </thruster>
    </engine>

    <!-- Engine #2 -->
    <engine file="eng_R3350">
      <location unit="IN">
	<x>558.32</x>
	<y>-177.84</y>
	<z>12</z>
      </location>
      <orient unit="DEG">
	<pitch>1</pitch>
	<roll>0</roll>
	<yaw>0</yaw>
      </orient>
      <feed>1</feed>
      <thruster file="prop_200in4v">
	<location>
	  <x>556.32</x>
	  <y>-177.84</y>
	  <z>12</z>
	</location>
	<orient unit="DEG">
	  <pitch>1</pitch>
	  <roll>0</roll>
	  <yaw>0</yaw>
	</orient>
      </thruster>
    </engine>

    <!-- Engine #3 -->
    <engine file="eng_R3350">
      <location unit="IN">
	<x>558.32</x>
	<y>177.84</y>
	<z>12</z>
      </location>
      <orient unit="DEG">
	<pitch>1</pitch>
	<roll>0</roll>
	<yaw>0</yaw>
      </orient>
      <feed>2</feed>
      <thruster file="prop_200in4v">
	<location>
	  <x>556.32</x>
	  <y>177.84</y>
	  <z>12</z>
	</location>
	<orient unit="DEG">
	  <pitch>1</pitch>
	  <roll>0</roll>
	  <yaw>0</yaw>
	</orient>
      </thruster>
    </engine>

    <!-- Engine #4 -->
    <engine file="eng_R3350">
      <location unit="IN">
	<x>558.32</x>
	<y>386.4</y>
	<z>16</z>
      </location>
      <orient unit="DEG">
	<pitch>1</pitch>
	<roll>0</roll>
	<yaw>0</yaw>
      </orient>
      <feed>3</feed>
      <thruster file="prop_200in4v">
	<location>
	  <x>556.32</x>
	  <y>386.4</y>
	  <z>16</z>
	</location>
	<orient unit="DEG">
	  <pitch>1</pitch>
	  <roll>0</roll>
	  <yaw>0</yaw>
	</orient>
      </thruster>
    </engine>

    <!-- Engine #1 feed -->
    <tank type="FUEL" number="0">
      <location>
	<x>608</x>
	<y>-350</y>
	<z>0</z>
      </location>
      <radius>1</radius>
      <capacity>2804.00</capacity>
      <contents>2804.00</contents>
    </tank>

    <!-- Engine #2 feed -->
    <tank type="FUEL" number="1">
      <location>
	<x>608</x>
	<y>-180</y>
	<z>0</z>
      </location>
      <radius>1</radius>
      <capacity>2804.00</capacity>
      <contents>2804.00</contents>
    </tank>

    <!-- Engine #3 feed -->
    <tank type="FUEL" number="2">
      <location>
	<x>608</x>
	<y>180</y>
	<z>0</z>
      </location>
      <radius>1</radius>
      <capacity>2804.00</capacity>
      <contents>2804.00</contents>
    </tank>

    <!-- Engine #4 feed -->
    <tank type="FUEL" number="3">
      <location>
	<x>608</x>
	<y>350</y>
	<z>0</z>
      </location>
      <radius>1</radius>
      <capacity>2804.00</capacity>
      <contents>2804.00</contents>
    </tank>

    <!-- Center tanks -->
    <tank type="FUEL" number="4">
      <location>
	<x>608</x>
	<y>0</y>
	<z>0</z>
      </location>
      <radius>1</radius>
      <capacity>1315</capacity>
      <contents>0</contents>
    </tank>

    <!-- Fwd bomb bay -->
    <tank type="FUEL" number="5">
      <location>
	<x>608</x>
	<y>0</y>
	<z>0</z>
      </location>
      <radius>1</radius>
      <capacity>1280</capacity>
      <contents>0</contents>
    </tank>

    <!-- Rear bomb bay -->
    <tank type="FUEL" number="6">
      <location>
	<x>608</x>
	<y>0</y>
	<z>0</z>
      </location>
      <radius>1</radius>
      <capacity>1280</capacity>
      <contents>0</contents>
    </tank>
  </propulsion>

  <flight_control name="FCS: b29">
<channel name="Pitch">

   <summer name="Pitch Trim Sum">
      <input>fcs/elevator-cmd-norm</input>
      <input>fcs/pitch-trim-cmd-norm</input>
      <clipto>
        <min> -1 </min>
        <max>  1 </max>
      </clipto>
   </summer>

   <aerosurface_scale name="Elevator Control">
      <input>fcs/pitch-trim-sum</input>
      <range>
        <min> -0.35 </min>
        <max>  0.35 </max>
      </range>
      <output>fcs/elevator-pos-rad</output>
   </aerosurface_scale>

   <aerosurface_scale name="elevator normalization">
      <input>fcs/elevator-pos-rad</input>
      <domain>
        <min> -0.35 </min>
        <max>  0.35 </max>
      </domain>
      <range>
        <min> -1 </min>
        <max>  1 </max>
      </range>
      <output>fcs/elevator-pos-norm</output>
   </aerosurface_scale>

  </channel>

  <channel name="Roll">

   <summer name="Roll Trim Sum">
      <input>fcs/aileron-cmd-norm</input>
      <input>fcs/roll-trim-cmd-norm</input>
      <clipto>
        <min> -1 </min>
        <max>  1 </max>
      </clipto>
   </summer>

   <aerosurface_scale name="Left Aileron Control">
      <input>fcs/roll-trim-sum</input>
      <range>
        <min> -0.35 </min>
        <max>  0.35 </max>
      </range>
      <output>fcs/left-aileron-pos-rad</output>
   </aerosurface_scale>

   <aerosurface_scale name="Right Aileron Control">
      <input>fcs/roll-trim-sum</input>
      <range>
        <min> -0.35 </min>
        <max>  0.35 </max>
      </range>
      <output>fcs/right-aileron-pos-rad</output>
   </aerosurface_scale>

   <aerosurface_scale name="left aileron normalization">
      <input>fcs/left-aileron-pos-rad</input>
      <domain>
        <min> -0.35 </min>
        <max>  0.35 </max>
      </domain>
      <range>
        <min> -1 </min>
        <max>  1 </max>
      </range>
      <output>fcs/left-aileron-pos-norm</output>
   </aerosurface_scale>

   <aerosurface_scale name="right aileron normalization">
      <input>fcs/right-aileron-pos-rad</input>
      <domain>
        <min> -0.35 </min>
        <max>  0.35 </max>
      </domain>
      <range>
        <min> -1 </min>
        <max>  1 </max>
      </range>
      <output>fcs/right-aileron-pos-norm</output>
   </aerosurface_scale>

  </channel>

  <channel name="Yaw">

   <summer name="Rudder Command Sum">
      <input>fcs/rudder-cmd-norm</input>
      <input>fcs/yaw-trim-cmd-norm</input>
      <clipto>
        <min> -1 </min>
        <max>  1 </max>
      </clipto>
   </summer>

   <aerosurface_scale name="Rudder Control">
      <input>fcs/rudder-command-sum</input>
      <range>
        <min> -0.35 </min>
        <max>  0.35 </max>
      </range>
      <output>fcs/rudder-pos-rad</output>
   </aerosurface_scale>

   <aerosurface_scale name="rudder normalization">
      <input>fcs/rudder-pos-rad</input>
      <domain>
        <min> -0.35 </min>
        <max>  0.35 </max>
      </domain>
      <range>
        <min> -1 </min>
        <max>  1 </max>
      </range>
      <output>fcs/rudder-pos-norm</output>
   </aerosurface_scale>

  </channel>

  <channel name="Flaps">
   <kinematic name="Flaps Control">
     <input>fcs/flap-cmd-norm</input>
     <traverse>
       <setting>
          <position>  0 </position>
          <time>      0 </time>
       </setting>
       <setting>
          <position> 15 </position>
          <time>      4 </time>
       </setting>
       <setting>
          <position> 20 </position>
          <time>      3 </time>
       </setting>
       <setting>
          <position> 25 </position>
          <time>      3 </time>
       </setting>
       <setting>
          <position> 35 </position>
          <time>      3 </time>
       </setting>
     </traverse>
     <output>fcs/flap-pos-deg</output>
   </kinematic>

   <aerosurface_scale name="flap normalization">
      <input>fcs/flap-pos-deg</input>
      <domain>
        <min>  0 </min>
        <max> 35 </max>
      </domain>
      <range>
        <min> 0 </min>
        <max> 1 </max>
      </range>
      <output>fcs/flap-pos-norm</output>
   </aerosurface_scale>

  </channel>

  <channel name="Landing Gear">
   <kinematic name="Gear Control">
     <input>gear/gear-cmd-norm</input>
     <traverse>
       <setting>
          <position> 0 </position>
          <time>     0 </time>
       </setting>
       <setting>
          <position> 1 </position>
          <time>     5 </time>
       </setting>
     </traverse>
     <output>gear/gear-pos-norm</output>
   </kinematic>

  </channel>

  <channel name="Speedbrake">
   <kinematic name="Speedbrake Control">
     <input>fcs/speedbrake-cmd-norm</input>
     <traverse>
       <setting>
          <position> 0 </position>
          <time>     0 </time>
       </setting>
       <setting>
          <position> 1 </position>
          <time>     1 </time>
       </setting>
     </traverse>
     <output>fcs/speedbrake-pos-norm</output>
   </kinematic>

  </channel>
</flight_control>

<aerodynamics>

  <axis name="LIFT">

    <function name="aero/force/Lift_alpha">
      <description>Lift due to alpha</description>
      <product>
          <property>aero/qbar-psf</property>
          <property>metrics/Sw-sqft</property>
          <table>
            <independentVar lookup="row">aero/alpha-rad</independentVar>
						<tableData>
					              -0.20 -0.740
					               0.00  0.440
					               0.24  1.600
					               0.60  0.904
						</tableData>
          </table>
      </product>
    </function>

    <function name="aero/force/Lift_flap">
       <description>Delta Lift due to flaps</description>
       <product>
           <property>aero/qbar-psf</property>
           <property>metrics/Sw-sqft</property>
           <property>fcs/flap-pos-deg</property>
           <value> 0.04000 </value>
       </product>
    </function>

    <function name="aero/force/Lift_speedbrake">
       <description>Delta Lift due to speedbrake</description>
       <product>
           <property>aero/qbar-psf</property>
           <property>metrics/Sw-sqft</property>
           <property>fcs/speedbrake-pos-norm</property>
           <value>0</value>
       </product>
    </function>

    <function name="aero/force/Lift_elevator">
       <description>Lift due to Elevator Deflection</description>
       <product>
           <property>aero/qbar-psf</property>
           <property>metrics/Sw-sqft</property>
           <property>fcs/elevator-pos-rad</property>
           <value>0.2</value>
       </product>
    </function>

  </axis>

  <axis name="DRAG">

    <function name="aero/force/Drag_basic">
       <description>Drag at zero lift</description>
       <product>
          <property>aero/qbar-psf</property>
          <property>metrics/Sw-sqft</property>
          <table>
            <independentVar lookup="row">aero/alpha-rad</independentVar>
            <tableData>
             -1.57    1.500
             -0.26    0.033
              0.00    0.025
              0.26    0.033
              1.57    1.500
            </tableData>
          </table>
       </product>
    </function>

    <function name="aero/force/Drag_induced">
       <description>Induced drag</description>
         <product>
           <property>aero/qbar-psf</property>
           <property>metrics/Sw-sqft</property>
           <property>aero/cl-squared</property>
           <value>0.039</value>
         </product>
    </function>

    <function name="aero/force/Drag_mach">
       <description>Drag due to mach</description>
        <product>
          <property>aero/qbar-psf</property>
          <property>metrics/Sw-sqft</property>
          <table>
            <independentVar lookup="row">velocities/mach</independentVar>
            <tableData>
                0.00      0.000
                0.7      0.000
                1.10      0.023
                1.80      0.015
            </tableData>
          </table>
        </product>
    </function>

    <function name="aero/force/Drag_flap">
       <description>Drag due to flaps</description>
         <product>
           <property>aero/qbar-psf</property>
           <property>metrics/Sw-sqft</property>
           <property>fcs/flap-pos-deg</property>
           <value> 0.00117 </value>
         </product>
    </function>

    <function name="aero/force/Drag_gear">
       <description>Drag due to gear</description>
         <product>
           <property>aero/qbar-psf</property>
           <property>metrics/Sw-sqft</property>
           <property>gear/gear-pos-norm</property>
           <value>0.023</value>
         </product>
    </function>

    <function name="aero/force/Drag_speedbrake">
       <description>Drag due to speedbrakes</description>
         <product>
           <property>aero/qbar-psf</property>
           <property>metrics/Sw-sqft</property>
           <property>fcs/speedbrake-pos-norm</property>
           <value>0.025</value>
         </product>
    </function>

    <function name="aero/force/Drag_beta">
       <description>Drag due to sideslip</description>
       <product>
          <property>aero/qbar-psf</property>
          <property>metrics/Sw-sqft</property>
          <table>
            <independentVar lookup="row">aero/beta-rad</independentVar>
            <tableData>
              -1.57    1.230
              -0.26    0.050
               0.00    0.000
               0.26    0.050
               1.57    1.230
            </tableData>
          </table>
       </product>
    </function>

    <function name="aero/force/Drag_elevator">
       <description>Drag due to Elevator Deflection</description>
       <product>
           <property>aero/qbar-psf</property>
           <property>metrics/Sw-sqft</property>
           <abs><property>fcs/elevator-pos-norm</property></abs>
           <value>0.04</value>
       </product>
    </function>

  </axis>

  <axis name="SIDE">

    <function name="aero/force/Side_beta">
       <description>Side force due to beta</description>
       <product>
           <property>aero/qbar-psf</property>
           <property>metrics/Sw-sqft</property>
           <property>aero/beta-rad</property>
           <value>-1</value>
       </product>
    </function>

  </axis>

  <axis name="ROLL">

    <function name="aero/moment/Roll_beta">
       <description>Roll moment due to beta</description>
       <product>
           <property>aero/qbar-psf</property>
           <property>metrics/Sw-sqft</property>
           <property>metrics/bw-ft</property>
           <property>aero/beta-rad</property>
           <value>-0.1</value>
       </product>
    </function>

    <function name="aero/moment/Roll_damp">
       <description>Roll moment due to roll rate</description>
       <product>
           <property>aero/qbar-psf</property>
           <property>metrics/Sw-sqft</property>
           <property>metrics/bw-ft</property>
           <property>aero/bi2vel</property>
           <property>velocities/p-aero-rad_sec</property>
           <value>-0.4</value>
       </product>
    </function>

    <function name="aero/moment/Roll_yaw">
       <description>Roll moment due to yaw rate</description>
       <product>
           <property>aero/qbar-psf</property>
           <property>metrics/Sw-sqft</property>
           <property>metrics/bw-ft</property>
           <property>aero/bi2vel</property>
           <property>velocities/r-aero-rad_sec</property>
           <value>0.15</value>
       </product>
    </function>

    <function name="aero/moment/Roll_aileron">
       <description>Roll moment due to aileron</description>
       <product>
          <property>aero/qbar-psf</property>
          <property>metrics/Sw-sqft</property>
          <property>metrics/bw-ft</property>
          <property>fcs/left-aileron-pos-rad</property>
          <value>0.15</value>
       </product>
    </function>

    <function name="aero/moment/Roll_rudder">
       <description>Roll moment due to rudder</description>
       <product>
           <property>aero/qbar-psf</property>
           <property>metrics/Sw-sqft</property>
           <property>metrics/bw-ft</property>
           <property>fcs/rudder-pos-rad</property>
           <value>0.01</value>
       </product>
    </function>

  </axis>

  <axis name="PITCH">

    <function name="aero/moment/Pitch_alpha">
       <description>Pitch moment due to alpha</description>
       <product>
           <property>aero/qbar-psf</property>
           <property>metrics/Sw-sqft</property>
           <property>metrics/cbarw-ft</property>
           <property>aero/alpha-rad</property>
           <value>-0.4</value>
       </product>
    </function>

    <function name="aero/moment/Pitch_elevator">
       <description>Pitch moment due to elevator</description>
       <product>
          <property>aero/qbar-psf</property>
          <property>metrics/Sw-sqft</property>
          <property>metrics/cbarw-ft</property>
          <property>fcs/elevator-pos-rad</property>
          <table>
            <independentVar lookup="row">velocities/mach</independentVar>
            <tableData>
              0.0     -1.000
              2.0     -0.250
            </tableData>
          </table>
       </product>
    </function>

    <function name="aero/moment/Pitch_damp">
       <description>Pitch moment due to pitch rate</description>
       <product>
           <property>aero/qbar-psf</property>
           <property>metrics/Sw-sqft</property>
           <property>metrics/cbarw-ft</property>
           <property>aero/ci2vel</property>
           <property>velocities/q-aero-rad_sec</property>
           <value>-22</value>
       </product>
    </function>

    <function name="aero/moment/Pitch_alphadot">
       <description>Pitch moment due to alpha rate</description>
       <product>
           <property>aero/qbar-psf</property>
           <property>metrics/Sw-sqft</property>
           <property>metrics/cbarw-ft</property>
           <property>aero/ci2vel</property>
           <property>aero/alphadot-rad_sec</property>
           <value>-8</value>
       </product>
    </function>

  </axis>

  <axis name="YAW">

    <function name="aero/moment/Yaw_beta">
       <description>Yaw moment due to beta</description>
       <product>
           <property>aero/qbar-psf</property>
           <property>metrics/Sw-sqft</property>
           <property>metrics/bw-ft</property>
           <property>aero/beta-rad</property>
           <value>0.12</value>
       </product>
    </function>

    <function name="aero/moment/Yaw_damp">
       <description>Yaw moment due to yaw rate</description>
       <product>
           <property>aero/qbar-psf</property>
           <property>metrics/Sw-sqft</property>
           <property>metrics/bw-ft</property>
           <property>aero/bi2vel</property>
           <property>velocities/r-aero-rad_sec</property>
           <value>-0.15</value>
       </product>
    </function>

    <function name="aero/moment/Yaw_rudder">
       <description>Yaw moment due to rudder</description>
       <product>
           <property>aero/qbar-psf</property>
           <property>metrics/Sw-sqft</property>
           <property>metrics/bw-ft</property>
           <property>fcs/rudder-pos-rad</property>
           <value>-0.1</value>
       </product>
    </function>

    <function name="aero/moment/Yaw_aileron">
       <description>Adverse yaw</description>
       <product>
           <property>aero/qbar-psf</property>
           <property>metrics/Sw-sqft</property>
           <property>metrics/bw-ft</property>
           <property>fcs/left-aileron-pos-rad</property>
           <value>-0.008</value>
       </product>
    </function>

  </axis>

 </aerodynamics>

<external_reactions>
 </external_reactions>
</fdm_config>
